<Node name="root"  dt="0.01" showBehaviorModels="1" showCollisionModels="0" showMappings="0" showForceFields="1" showInteractionForceFields="1" gravity="0 -0.981 0">
	<MasterConstraintSolver printLog="0"/>

	<Node name="Beam1">
		  <EulerImplicit name="cg_odesolver" printLog="false"/>
    	  <BTDLinearSolver template="NewMatBand" bandWidth="11"  printLog="false" verbose="false" />
		  <MechanicalObject template="Rigid" name="DOFs1" position="0 0 0 0 0 0 1  1 0 0 0 0 0 1  2 0 0 0 0 0 1  3 0 0 0 0 0 1  4 0 0 0 0 0 1  5 0 0 0 0 0 1  6 0 0 0 0 0 1  7 0 0 0 0 0 1" />
      	  <Mesh name="lines" lines="0 1 1 2 2 3 3 4 4 5 5 6 6 7" />
      	  <UniformMass mass="1 1 0.01 0 0 0 0.1 0 0 0 0.1" printLog="false" />
      	  <BeamFEMForceField name="FEM" radius="0.1" youngModulus="2000000" />
      	  <FixedConstraint name="FixedConstraint" indices="7" />
      	  <LinearSolverConstraintCorrection />

      	  <Node name="ConstraintPoint">
      	  	<MechanicalObject template="Rigid" name="dof1" position="0 0 0 0 0 -0.707107 0.707107 0 -1"/>
      	  	<RigidRigidMapping index="0" />
      	  </Node>


	</Node>


	<Node name="Beam2">
	      <EulerImplicit name="cg_odesolver" printLog="false"/>
    	  <BTDLinearSolver template="NewMatBand" bandWidth="11"  printLog="false" verbose="false" />
		  <MechanicalObject template="Rigid" name="DOFs2" position="0 0 0 0 0 -0.707107 0.707107 0 -1 0 0 0-0.707107 0.707107  0 -2 0 0 0 -0.707107 0.707107  0 -3 0 0 0 -0.707107 0.707107  0 -4 0 0 0 -0.707107 0.707107  0 -5 0 0 0 -0.707107 0.707107  0 -6 0 0 0 -0.707107 0.707107  0 -7 0 0 0 -0.707107 0.707107" />
      	  <Mesh name="lines" lines="0 1 1 2 2 3 3 4 4 5 5 6 6 7" />
      	  <UniformMass mass="1 1 0.01 0 0 0 0.1 0 0 0 0.1" printLog="false" />
      	  <BeamFEMForceField name="FEM" radius="0.1" youngModulus="20000000" />
      	  <LinearSolverConstraintCorrection />

	</Node>

	<BilateralInteractionConstraint object1="Beam1/ConstraintPoint/dof1" object2="Beam2/DOFs2" first_point="0" second_point="0" />

</Node>
