<Node name="root"  dt="0.03" showVisualModels="1" showBehaviorModels="1" showCollisionModels="0"  showMappings="0" showForceFields="0" showWireFrame="0">
	<MasterContactSolver initial_guess="true" displayTime="1"/>
	<CollisionPipeline depth="6" verbose="0" draw="0"/>
	<BruteForceDetection name="N2" />
	<LocalMinDistance name="Proximity" alarmDistance="0.35" contactDistance="0.1" useLMDFilters="1"/>
	<CollisionResponse name="Response" response="FrictionContact"/>

	<Node>
		<EulerImplicit name="cg_odesolver" printLog="false"/>
		<CGLinearSolver iterations="25" name="linear solver" tolerance="1.0e-9" threshold="1.0e-9" />
		<CollisionGroup name="Group" />

		<Node name="TORUS">
			<MechanicalObject template="Rigid" scale="1.0"  dx="0.0" dy="0.0" dz="0.0"/>
			<UniformMass mass="40.0"/>
			<UncoupledConstraintCorrection/>
			<Node name="Visu">
				<OglModel name="Visual" fileMesh="mesh/torus.obj" color="1.0 0.5 0.25 1.0" scale="1.0"/>
				<RigidMapping object1="../.." object2="Visual" />
			</Node>
			<Node name="Surf2">
				<MeshLoader name="meshLoader" filename="mesh/torus_for_collision.obj" triangulate="true"/>
				<Mesh/>
				<MechanicalObject scale="1.0"/>
				<Triangle/>
				<TriangleMinDistanceFilter/>
				<Line/>
				<LineMinDistanceFilter/>
				<Point/>
				<PointMinDistanceFilter/>
				<RigidMapping/>
			</Node>
		</Node>

		<Node name="MAN">
			<EulerSolver/>
			<MechanicalObject template="Rigid"  dx="0.0" dy="0.0" dz="0.0"/>
			<UniformMass mass="100.0"/>
			<UncoupledConstraintCorrection/>
			<Node name="Visu">
				<OglModel name="Visual" fileMesh="mesh/man.obj" color="0.8 0.8 0.8 1.0" scale="10" dy="-3.0"/>
				<RigidMapping object1="../.." object2="Visual" />
			</Node>
			<Node name="Surf2">
				<MeshLoader name="meshLoader" filename="mesh/man.obj" triangulate="true"/>
				<Mesh/>
				<MechanicalObject scale="10" dy="-3.0"/>
				<Triangle/>
				<TriangleMinDistanceFilter/>
				<Line/>
				<LineMinDistanceFilter/>
				<Point/>
				<PointMinDistanceFilter/>
				<RigidMapping/>
			</Node>
		</Node>

		<!--
		<Node name="CUBE">
			<MechanicalObject template="Rigid" scale="0.3"  dx="-2.0" dy="-2.0" dz="-0.5"/>
			<UniformMass mass="100.0"/>
			<UncoupledConstraintCorrection"/>
			<Node name="Visu">
				<OglModel name="Visual" fileMesh="mesh/smCube27.obj" color="0.0 0.5 0.5 1.0" scale="0.3"/>
				<RigidMapping object1="../.." object2="Visual" />
			</Node>
			<Node name="Surf2">
				<MeshLoader name="meshLoader" filename="mesh/smCube27.obj" triangulate="true"/>
				<Mesh/>
				<MechanicalObject scale="0.3"/>
				<Triangle/>
				<TriangleMinDistanceFilter/>
				<Line/>
				<LineMinDistanceFilter/>
				<Point/>
				<PointMinDistanceFilter/>
				<RigidMapping/>
			</Node>
		</Node>

		<Node name="DRAGON1">
			<EulerSolver/>
			<MechanicalObject template="Rigid" scale="10.0"  dx="0.0" dy="2.5" dz="0.0"/>
			<UniformMass mass="100.0"/>
			<UncoupledConstraintCorrection/>
			<Node name="Visu">
				<OglModel name="Visual" fileMesh="mesh/dragon_clean.obj" color="0.8 0.8 0.8 1.0" scale="0.25"/>
				<RigidMapping object1="../.." object2="Visual"/>
			</Node>
			<Node name="Surf2">
				<MeshLoader name="meshLoader" filename="mesh/dragon_clean.obj" triangulate="true"/>
				<Mesh/>
				<MechanicalObject scale="0.25"/>
				<Triangle/>
				<TriangleMinDistanceFilter/>
				<Line/>
				<LineMinDistanceFilter/>
				<Point/>
				<PointMinDistanceFilter/>
				<RigidMapping/>
			</Node>
		</Node>
		-->

		<Node name="BOX">
			<MeshLoader name="meshLoader" filename="mesh/box_inside.obj" triangulate="true"/>
			<Mesh/>
			<MechanicalObject/>
			<Triangle simulated="0" moving="0"/>
			<TriangleMinDistanceFilter/>
			<Line simulated="0" moving="0"/>
			<LineMinDistanceFilter/>
			<Point simulated="0" moving="0"/>
			<PointMinDistanceFilter/>
			<OglModel name="Visual" fileMesh="mesh/box_outside.obj" color="1 0 0 0.3"/>
		</Node>
	</Node>
</Node>
