<Node name="root"  dt="0.005" showBehaviorModels="1" showCollisionModels="0" showMappings="0" showForceFields="0">

	<CollisionPipeline depth="6" verbose="0" draw="0"/>
	<BruteForceDetection name="N2"/>
	<NewProximityIntersection name="NewProximity" alarmDistance="2.2" contactDistance="1.0"/>
	<CollisionResponse name="Response" response="default"/>
	<CollisionGroup name="Group"/>

	<Node name="BeamAdapted">
		<EulerImplicit rayleighStiffness="0" printLog="false"/>
		<BTDLinearSolver template="NewMatBand" bandWidth="11" threshold="0.000000001" tolerance="0.0000000001" printLog="false" verbose="false"/>

		<MeshLoader name="meshLoader" filename="mesh/edgeSet2.mesh"/>
		<MechanicalObject name="MechanicalDOFs" template="Rigid" position="0 0 0 0 0 0 1  1 0 0 0 0 0 1  2 0 0 0 0 0 1  3 0 0 0 0 0 1  4 0 0 0 0 0 1  5 0 0 0 0 0 1  6 0 0 0 0 0 1"/>
		<FixedConstraint name="FixedConstraint" indices="0"/>
		<UniformMass mass="1 1 0.01 0 0 0 0.1 0 0 0 0.1" printLog="false" showInitialCenterOfGravity="false"/>

		<include href="Objects/EdgeSetTopology.xml" template="Rigid"/>

	<!--	<EdgeSetController listening="true" mainDirection="1.0 0.0 0.0" reversed="false"/>	-->
		<BeamAdapter name="beamAdapter" listening="true" minCurvatureAngle="3" maxCurvatureAngle="12" nbMaxBeams="6" activate="true"/>
		<BeamFEMForceField name="FEM" radius="0.05" youngModulus="500000000"/>

		<Object type="ConstantForceField" indexFromEnd="true" points="0" forces="0 -200.0 0 0 1 0"/>

		<Node name="CM">
			<MechanicalObject name="CollisionDOFs" template="Vec3d" size="3"/>
			<LineSet contactStiffness="100.0" group="2"/>
			<IdentityMapping/>
		</Node>

		<Node name="SPH_CM">
			<MechanicalObject/>
			<Sphere contactStiffness="10.0" radius="0.2" group="2"/>
			<RigidMapping indexFromEnd="true" index="0"/>
		</Node>

		<!--
		<Node name="VM">
			<MechanicalObject name="VisualDOFs"/>
			<include href="Objects/QuadSetTopology.xml"/>
			<Edge2QuadTopologicalMapping nbPointsOnEachCircle="10" radius="0.5" object1="../../Container" object2="Container"/>
			<TubularMapping nbPointsOnEachCircle="10" radius="0.5" object1="../../MechanicalDOFs" object2="../VisualDOFs"/>

			<Node name="Visu">
				<OglModel name="Visual" color="1.0 0.25 0.25 1.0"/>
				<IdentityMapping object1="../../VisualDOFs" object2="Visual"/>
			</Node>
		</Node>
		-->
	</Node>

	<Node name="NonAdaptedBeam">
		<EulerImplicit rayleighStiffness="0" printLog="false"/>
		<BTDLinearSolver template="NewMatBand" bandWidth="11" threshold="0.000000001" tolerance="0.0000000001" printLog="false" verbose="false"/>

		<MeshLoader name="meshLoader" filename="mesh/edgeSet2.mesh"/>
		<MechanicalObject name="MechanicalDOFs" template="Rigid" position="0 0 2.0 0 0 0 1  1 0 2.0 0 0 0 1  2 0 2.0 0 0 0 1  3 0 2.0 0 0 0 1  4 0 2.0 0 0 0 1  5 0 2.0 0 0 0 1  6 0 2.0 0 0 0 1"/>
		<FixedConstraint name="FixedConstraint" indices="0"/>
		<UniformMass mass="1 1 0.01 0 0 0 0.1 0 0 0 0.1" printLog="false" showInitialCenterOfGravity="false"/>

		<include href="Objects/EdgeSetTopology.xml" template="Rigid"/>

	<!--	<EdgeSetController listening="true" mainDirection="1.0 0.0 0.0" reversed="false"/>	-->
		<BeamFEMForceField name="FEM" radius="0.05" youngModulus="500000000"/>

		<Object type="ConstantForceField" indexFromEnd="true" points="0" forces="0 -200.0 0 0 1 0"/>

		<Node name="CM">
			<MechanicalObject name="CollisionDOFs" template="Vec3d" size="3"/>
			<LineSet contactStiffness="100.0" group="2"/>
			<IdentityMapping/>
		</Node>

		<Node name="SPH_CM">
			<MechanicalObject/>
			<Sphere contactStiffness="10.0" radius="0.2" group="2"/>
			<RigidMapping indexFromEnd="true" index="0"/>
		</Node>

		<!--
		<Node name="VM">
			<MechanicalObject name="VisualDOFs"/>
			<include href="Objects/QuadSetTopology.xml"/>
			<Edge2QuadTopologicalMapping nbPointsOnEachCircle="10" radius="0.5" object1="../../Container" object2="Container"/>
			<TubularMapping nbPointsOnEachCircle="10" radius="0.5" object1="../../MechanicalDOFs" object2="../VisualDOFs"/>

			<Node name="Visu">
				<OglModel name="Visual" color="1.0 0.25 0.25 1.0"/>
				<IdentityMapping object1="../../VisualDOFs" object2="Visual"/>
			</Node>
		</Node>
		-->
	</Node>

</Node>
