<Node name="root" dt="0.02" showBehaviorModels="0" showCollisionModels="1" showMappings="0" showForceFields="0" >
	<MeshLoader name="meshLoader"  filename="mesh/icosahedron.obj"/>
	<Vertex2Frame name="vertex2frame" template="Rigid" vertices="@meshLoader.vertices" texCoords="@meshLoader.texCoords" normals="@meshLoader.normals" facets="@meshLoader.facets"/>
	<MechanicalObject name="dofs" template="Rigid" position="@../vertex2frame.frames" />
	<Object type="UniformMass" totalmass="0.1"/>

	<Object type="OglModel" name="Visual" color="red" filename="mesh/icosahedron.obj"/>

</Node>
