<Node name="root" dt="0.01" gravity="0 -9.81 0" showBehaviorModels="0" showCollisionModels="0" showBoundingCollisionModels="0" showForceFields="0" showWireFrame="0" showInteractionForceFields="0">
	<Mesh name="mesh" template="Vec3f" filename="mesh/dragon.obj"/>
	<MeshLoader name="meshLoader" template="Vec3f" filename="mesh/dragon.obj"/>
	<MechanicalObject template="Vec3f" name="mecha" />
	<TetrahedronSetTopologyContainer name="topo"/>
	<VTKExporter filename="example.vtk" listening="true" edges="0" triangles="1" quads="0" tetras="0"  pointsDataFields="mecha.position" />
</Node>
