<Node name="root" dt="0.04" showBehaviorModels="1" showCollisionModels="0" showMappings="0" showForceFields="0">
	<Object type="CollisionPipeline" verbose="0" />
	<Object type="BruteForceDetection" name="N2" />
	<Object type="CollisionResponse" name="Response" />
	<Object type="NewProximityIntersection" alarmDistance="0.002" contactDistance="0.001" />

	<Node name="Floor">
		<Object type="RegularGrid"
			nx="2" ny="1" nz="2"
			xmin="10" xmax="-10"
			ymin="-3.05" ymax="-3.05"
			zmin="-10" zmax="10" />
		<Object type="MechanicalObject" />
		<Node name="Visu">
			<Object type="OglModel" name="Visual" color="red"/>
			<Object type="IdentityMapping" object1="../.." object2="Visual"/>
		</Node>
	</Node>
	<Node name="M1">
		<!--<Object type="CGImplicit" iterations="10" />-->
		<Object type="EulerImplicit" />

		<!--<Object type="CGLinearSolver" iterations="1000" threshold="1.0e-9" printLog="1" verbose="0" />-->
		<!--<Object type="CGLinearSolver" iterations="1000" threshold="1.0e-9" printLog="1" verbose="0" template="CompressedRowSparseMatrix3d"/>-->
		<Object type="PCGLinearSolver" iterations="1000" threshold="1.0e-9" printLog="0" refresh="0" verbose="0" tags="M" />
		<!--<Object type="JacobiPreconditioner" name="Jacobi Preconditioner" />-->
		<!--<Object type="BlockJacobiPreconditioner" name="Block Jacobi Preconditioner" bandWidth="2"/>-->
		<!--<Object type="SSORPreconditioner" name="SSOR Preconditioner" template="CompressedRowSparseMatrix3d" />-->
		<!--<Object type="CholeskySolver" name="Cholesky Preconditioner" />-->
		<Object type="PrecomputedConstraintCorrectionPreconditioner" name="PrecomputedConstraintCorrectionPreconditioner Preconditioner"/>

		<Object type="RegularGrid"
			nx="4" ny="4" nz="20"
			xmin="-1.5" xmax="1.5"
			ymin="0" ymax="3"
			zmin="-7.5" zmax="7.5"
		/>
		<Object type="MechanicalObject" />
		<Object type="UniformMass" totalmass="400" />
		<Object type="BoxConstraint" box="-1.6 -0.1 -7.6 1.6 3.1 -7.4" />
		<!--		<Object type="MeshSpringForceField" stiffness="2333" /> -->
		<Object type="TetrahedronFEMForceField" name="FEM" youngModulus="10000" poissonRatio="0.4" method="large" />
		<Object type="PlaneForceField" normal="0 1 0" d="-3" stiffness="10000"  draw="1" />
		<!--
		<Node>
			<Object type="RegularGrid"
				nx="2" ny="2" nz="9"
				xmin="-0.75" xmax="0.75"
				ymin="0.75" ymax="2.25"
				zmin="-5.5" zmax="6.5"
			/>
			<Object type="SphereModel" radius="1.0" />
			<MechanicalObject/>
			<Object type="BarycentricMapping" />
		</Node>
		<Node>
			<Object type="CubeTopology" internalPoints="0" splitNormals="1"
				nx="10" ny="10" nz="46"
				xmin="-1.5" xmax="1.5"
				ymin="0" ymax="3"
				zmin="-7.5" zmax="7.5"
			/>
			<Object type="VisualModel" name="Visual"/>
			<Object type="SubsetMapping" object1="../.." object2="Visual" />
		</Node>
		-->
	</Node>
</Node>
