<Node name="root" dt="0.02" showBehaviorModels="0" showCollisionModels="0" showMappings="0" showForceFields="0" >
	<!-- <Object type="Simulation" name="Simulation" /> -->
	<CollisionPipeline verbose="0" name="CollisionPipeline"/>
	<BruteForceDetection name="N2" />
	<CollisionResponse response="default" name="collision response"/>
	<!--<Object type="CollisionGroup" />-->
	<Node name="Liver" depend="topo dofs">
		<!--<Object type="CGImplicit" iterations="25"/>-->
		<EulerImplicit name="cg_odesolver" printLog="false" tags="M" />


		<!--<Object type="CGLinearSolver" iterations="1000" threshold="1.0e-9" printLog="1" verbose="0" tags="M" />-->
		<!--<Object type="CGLinearSolver" iterations="1000" threshold="1.0e-9" printLog="1" verbose="0" template="CompressedRowSparseMatrix3d" tags="M" />-->
		<Object type="PCGLinearSolver" iterations="1000" threshold="1.0e-9" printLog="0" refresh="0" verbose="0" tags="M" />
		<!--<Object type="JacobiPreconditioner" name="Jacobi Preconditioner" />-->
		<!--<Object type="BlockJacobiPreconditioner" name="Block Jacobi Preconditioner" bandWidth="2"/>-->
		<!--<Object type="SSORPreconditioner" name="SSOR Preconditioner" template="CompressedRowSparseMatrix3d" />-->
		<!--<Object type="CholeskySolver" name="Cholesky Preconditioner" />-->
		<Object type="PrecomputedConstraintCorrectionPreconditioner" name="PrecomputedConstraintCorrectionPreconditioner Preconditioner"/>


		<MeshLoader name="meshLoader" filename="mesh/liver.msh"/>
		<!-- Container for the tetrahedra-->
		<TetrahedronSetTopologyContainer name="topo" />
		<MechanicalObject name="dofs" tags="M" />
		<!-- Algorithms: used in DiagonalMass to compute the mass -->
		<TetrahedronSetGeometryAlgorithms name="GeomAlgo"  />
		<DiagonalMass massDensity="1" name="computed using mass density" tags="M" />
		<TetrahedralCorotationalFEMForceField name="FEM" youngModulus="500" poissonRatio="0.3" computeGlobalMatrix="false" method="large" tags="M" />
                <FixedConstraint name="FixedConstraint" indices="3 39 64" tags="M" />

		<Node name="Visu">
		<!-- Using material contained in liver-smooth.obj -->
			<OglModel name="VisualModel" fileMesh="mesh/liver-smooth.obj"  />
			<BarycentricMapping object1="../.." object2="VisualModel" name="visual mapping"/>
		</Node>
		<Node name="Surf">
			<Sphere name="CollisionModel" filename="mesh/liver.sph" />
			<MechanicalObject tags="M" />
			<BarycentricMapping name="sphere mapping" tags="M" />
		</Node>
	</Node>
</Node>
